*Heading
** Job name: cfrp-fixture Model name: Model-1
** Generated by: Abaqus/CAE 2020
*Preprint, echo=NO, model=NO, history=NO, contact=NO
**
** PARTS
**
*Part, name=FIXTURE
*Node
      1,         250.,   58.3012695,           0.
      2,         230.,   58.3012695,           0.
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*Element, type=S4R
  1,    2,  341, 4435,  340
  2,  341,  342, 4436, 4435
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*Element, type=S3
171, 4494, 4502, 4501
1535, 5517, 5525, 5524
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*Nset, nset=ALL, generate
     1,  17430,      1
*Elset, elset=ALL, generate
     1,  16610,      1
*Nset, nset=LEFT
   71,   72,  139,  203,  205,  212
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*Elset, elset=LEFT
  1526,  1527,  1528,  1529,  1530,  1531
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*Elset, elset=_RIGHT_E3, internal
  162,  163,  164,  165,  166,  167
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*Elset, elset=_RIGHT_E4, internal
 1536, 1556, 1576, 1596, 1616, 1636, 1656, 1676, 1696, 6158, 6178, 6198, 6218, 6238, 6258
*Elset, elset=_RIGHT_E2, internal
  9128,  9148,  9168,  9188,  9208,  9228
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*Surface, type=ELEMENT, name=RIGHT
_RIGHT_E3, E3
_RIGHT_E4, E4
_RIGHT_E2, E2
** Region: (CompositeLayup-1-1: Generated From Layup)
*Elset, elset=CompositeLayup-1-1, generate
     1,  16610,      1
** Section: CompositeLayup-1-1
*Shell Section, elset=CompositeLayup-1-1, composite, layup=CompositeLayup-1, symmetric
0.2, 3, CFRP, 0., Ply-1
0.2, 3, CFRP, 45., Ply-2
0.2, 3, CFRP, -45., Ply-3
0.2, 3, CFRP, 90., Ply-4
*End Part
**
**
** ASSEMBLY
**
*Assembly, name=Assembly
**
*Instance, name=FIXTURE-1, part=FIXTURE
*End Instance
**
*End Assembly
**
** MATERIALS
**
*Material, name=CFRP
*Elastic, type=LAMINA
137100., 8800., 0.314, 4900., 4900., 2960.
*User Output Variables
      1,
** ----------------------------------------------------------------
**
** STEP: Step-1
**
*Step, name=Step-1, nlgeom=NO
*Static
1., 1., 1e-05, 1.
**
** BOUNDARY CONDITIONS
**
** Name: BC-Left Type: Symmetry/Antisymmetry/Encastre
*Boundary
FIXTURE-1.LEFT, ENCASTRE
**
** LOADS
**
** Name: Load-1   Type: Shell edge load Using Field: AnalyticalField-1
*Dload
FIXTURE-1.162, EDNOR3, 104.693
FIXTURE-1.163, EDNOR3, 99.0401
FIXTURE-1.164, EDNOR3, 93.3869
FIXTURE-1.165, EDNOR3, 87.7337
FIXTURE-1.166, EDNOR3, 82.0805
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FIXTURE-1.16610, EDNOR2, 232.103
**
** OUTPUT REQUESTS
**
*Restart, write, frequency=0
**
** FIELD OUTPUT: F-Output-2
**
*Output, field
*Node Output
U,
**
** FIELD OUTPUT: F-Output-1
**
*Element Output, elset=FIXTURE-1.CompositeLayup-1-1, directions=YES
2, 5, 8, 11, 14, 17, 20, 23
LE, S, UVARM
**
** HISTORY OUTPUT: H-Output-1
**
*Output, history, variable=PRESELECT
*End Step
